# алфавит
n := 118
# длинна пароля
k := 9
# скорость
# перебора
s := 50
# количество неверных
# паролей перед паузой
m := 7
# длительность паузы
v := 12
# количество вариантов
C := n^k = 4.43545e18
# время перебора
# паролей
t := C/s = 8.87091e16
# время перебора
# всех паролей
T := t*v/m = 1.52073e17
# Итоговое время
T1 := t + T = 2.40782e17
# Лет
T1 := T1/(3600*24*365) = 7.63514e9
# алфавит
n2 := 118
# время перебора
# паролей
t2 := 90
# скорость
# перебора
s2 := 50
# количество вариантов
C2 := t2*s2*365*24*60*60 = 141912000000
# длинна пароля
k2 := log(C2, n2) = 5.38256
# длинна пароля
k3 := 11
# время перебора
# паролей
t3 := 90
# скорость
# перебора
s3 := 50
# алфавит
n3 := nthroot(t3*s3*360*24*60*60, k3) = 10.3104
