Amin := -23
Amax := 1
Wn := 1.5
ε := sqrt(10^(0.1*Amax) - 1)
ε = 0.508847
Nb := log((10^(0.1*Amin) - 1)/ε^2)/(log(Wn)*2)
Nb = 1.66006 + 3.87406i
Nb := 15
Nc := acosh(sqrt((10^(0.1*Amin) - 1)/ε^2))/acosh(Wn)
Nc = 1.4814 + 1.63213i
Nc := 7
# Для фильтра Баттерворта:
p(w) := 1i*w
k0b := 1/ε
k1 := 1 .. Nb
pb(k1) := e^(1i*π*(0.5 + (2*k1 - 1)/(2*Nb)))
Hb(w) := k0b/product(p(w) - pb(k1), k1)
τb(w) := -d/dw(arg(Hb(w)))
# Для фильтра Чебышева:
k2 := 1 .. Nc
σc(k2) := -sinh(1*asinh(1/ε)/Nc)*sin((2*k2 - 1)*π/(2*Nc))
ξc(k2) := cosh(1*asinh(1/ε)/Nc)*cos((2*k2 - 1)*π/(2*Nc))
pc(k2) := σc(k2) + 1i*ξc(k2)
Hc(w) := 1/product(p(w) - pc(k2), k2)
k0c := sqrt(1 + ε^2*|Hc(1)|)^-1
τc(w) := -(d/dw(arg(Hc(w))))
τd(x) := [55; 24; 20; 5; 10; 8; 12]
x := [4*10^-3; 7.5 - 10^-3; 0.01; 0.64; 0.7; 1.4; 1.5]
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