Amin := -16
Amax := -1
Wn := 1.9
fv := 10
ε := sqrt(10^(0.1*Amax) - 1)
ε = 0.45351i
Nc := acosh(sqrt((10^(0.1*Amin) - 1)/ε^2))/acosh(Wn)
Nb := log((10^(0.1*Amin) - 1)/ε^2)/(log(Wn)*2)
Nc = 1.12447
Nb = 1.21214
Nc := ceil(Nc)
Nb := ceil(Nb)
p(w) := 1i*w
# Для фильтра Чебышева: | Для фильтра Баттерворта:
k2 := 1 .. Nc
k0b := 1/ε
k1 := 1 .. Nb
pb(k1) := e^(1i*π*(0.5 + (2*k1 - 1)/(2*Nb)))
σc(k2) := -sinh(1*asinh(1/ε)/Nc)*sin((2*k2 - 1)*π/(2*Nc))
Hb(w) := k0b/product(p(w) - pb(k1), k1)
ξc(k2) := cosh(1*asinh(1/ε)/Nc)*cos((2*k2 - 1)*π/(2*Nc))
τb(w) := -d/dw(arg(Hb(w)))
pc(k2) := σc(k2) + 1i*ξc(k2)
Hc(w) := 1/product(p(w) - pc(k2), k2)
k0c := sqrt(1 + ε^2*|Hc(1)|)^-1
τc(w) := -(d/dw(arg(Hc(w))))
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