Amin := -19
Amax := -1
wn := 1.8
f := 10
ε := sqrt(10^(0.1*Amax) - 1)
ε = 0.45351i
i := sqrt(-1)
π = 3.14159
p(w) := 1i*w
Nb := log((10^(0.1*Amin) - 1)/ε^2)/(log(wn)*2)
Nb = 1.3345
Nb := ceil(Nb)
k1 := 1 .. Nb
pb(k1) := exp(i*π*(0.5 + (2*k1 - 1)/(2*Nb)))
k0b := 1/ε
Hb(w) := k0b/product(p(w) - pb(k1), k1)
Hb(0) = -2.20502i
τd(w) := -d/dw(arg(Hb(w)))
τd(1) = -2.73363e-12
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