Amin := 23
Amax := 1
wn := 1.9
fpp := 10
ε := sqrt(10^(0.1*Amax) - 1)
Nc := acosh(sqrt((10^(0.1*Amin) - 1)/ε^2))/acosh(wn)
Nc := ceil(Nc)
Nc = 4
p(w) := 1i*w
σc(k2) := -sinh(1*asinh(1/ε)/Nc)*sin((2*k2 - 1)*π/(2*Nc))
k2 := 1 .. Nc
ξc(k2) := cosh(1*asinh(1/ε)/Nc)*cos((2*k2 - 1)*π/(2*Nc))
pc(k2) := σc(k2) + 1i*ξc(k2)
Hc(w) := 1/product(p(w) - pc(k2), k2)
k0c := sqrt(1 + ε^2*|Hc(1)|)^-1
τc(w) := -(d/dw(arg(Hc(w))))
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